ORIGIN := 1
Xw := [0, 50]
Yw := [0, 30]
m := 5  # -число подобластей
X :=
    for i ∈ 1 .. cols(Xw)
        for j ∈ 1 .. cols(Xw)*cols(Yw)
            k ← trunc((j - 1)/cols(Yw)) + 1
            X[j] ← transpose(Xw)[k]
        V ← stack(V, transpose(Yw))
    for i ∈ 2 .. cols(Xw)*cols(Yw) + 1
        J[i - 1] ← V[i]
    augment(X, J)
SOD :=
    for i ∈ 1 .. 5
        for j ∈ 1 .. m
            S[i, 1] ← i
            S[i, 2] ← i
            S[i, 3] ← S[i, 2] + 4
            S[i, 4] ← S[i, 3] + 1
            S[i, 5] ← S[i, 4] - 4
    S
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X = [0, 0; 0, 30; 50, 0; 50, 30]
SOD = [1, 1, 5, 6, 2; 2, 2, 6, 7, 3; 3, 3, 7, 8, 4; 4, 4, 8, 9, 5; 5, 5, 9, 10, 6]
SOD := [1, 1, 5, 6, 2; 2, 2, 6, 7, 3; 3, 3, 7, 8, 4; 4, 5, 9, 10, 6; 5, 7, 11, 12, 8]
FX :=
    for i ∈ 1 .. m
        for j ∈ 1 .. 4
            FXS[i, j] ← X[:, 1][SOD[i, j + 1]]
            FXS[i, 5] ← FXS[i, 1]
            FXS[i, 6] ← sqrt(-1)
    FXS  # error: This array index is invalid for this array.
FY :=
    for i ∈ 1 .. m
        for j ∈ 1 .. 4
            FYS[i, j] ← X[:, 2][SOD[i, j + 1]]
            FYS[i, 5] ← FYS[i, 1]
            FYS[i, 6] ← sqrt(-1)
    FYS  # error: This array index is invalid for this array.
X = [0, 0; 0, 30; 50, 0; 50, 30]
Prog(M) :=
    k ← 1
    for i ∈ 1 .. rows(M)
        for j ∈ 1 .. cols(M)
            V[k] ← M[i, j]
            k ← k + 1
    V
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nodes := READPRN("nodes.txt")
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(145 - 150)^2 + (41.33975 - 50)^2 = 99.9999
elements := READPRN("elements.txt")
m := rows(elements) = 1  # - число элементов
n := rows(nodes) = 4
ORIGIN := 1
FX :=
    for i ∈ 1 .. m
        for j ∈ 1 .. 4
            FX[i, j] ← nodes[:, 2][elements[i, j + 1]]
            FX[i, 4] ← FX[i, 3] if j == 3
            FX[i, 5] ← FX[i, 1]
            FX[i, 6] ← sqrt(-1)
    FX
FY :=
    for i ∈ 1 .. m
        for j ∈ 1 .. 4
            FY[i, j] ← nodes[:, 3][elements[i, j + 1]]
            FY[i, 4] ← FY[i, 3] if j == 3
            FY[i, 5] ← FY[i, 1]
            FY[i, 6] ← sqrt(-1)
    FY
nodes = [1, 0, 0; 2, 300, 0; 3, 0, 200; 4, 300, 200]
elements = [1, 1, 2, 4, 3]
Prog(M) :=
    k ← 1
    for i ∈ 1 .. rows(M)
        for j ∈ 1 .. cols(M)
            G[k] ← M[i, j]
            k ← k + 1
    G
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nodes1 := READPRN("nodes.txt")
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nodes1 = [1, 0, 0; 2, 300, 0; 3, 0, 200; 4, 300, 200]
elements1 := READPRN("elements.txt")
m1 := rows(elements1) = 1  # - число элементов после удаления подобласти
rows(nodes1) = 4  # - число узлов после удаления подобласти
ORIGIN := 1
FX :=
    for i ∈ 1 .. m1
        for j ∈ 1 .. 4
            FX[i, j] ← nodes1[:, 2][elements1[i, j + 1]]
            FX[i, 4] ← FX[i, 1] if j == 3
            FX[i, 5] ← FX[i, 1]
            FX[i, 6] ← sqrt(-1)
    FX
FY :=
    for i ∈ 1 .. m1
        for j ∈ 1 .. 4
            FY[i, j] ← nodes1[:, 3][elements1[i, j + 1]]
            FY[i, 4] ← FY[i, 3] if j == 3
            FY[i, 5] ← FY[i, 1]
            FY[i, 6] ← sqrt(-1)
    FY
nodes1 = [1, 0, 0; 2, 300, 0; 3, 0, 200; 4, 300, 200]
elements1 = [1, 1, 2, 4, 3]
Prog(M) :=
    k ← 1
    for i ∈ 1 .. rows(M)
        for j ∈ 1 .. cols(M)
            G[k] ← M[i, j]
            k ← k + 1
    G
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FX = [0, 300, 300, 0, 0, 1i]
FY = [0, 0, 200, 200, 0, 1i]
global_stiffness_matrix := READPRN("out_stiffness_matrix.txt")
global_load_vector := READPRN("out_loads_vec.txt")
GSM := global_stiffness_matrix
GLV := global_load_vector
# сумма элементов строки или столбца матрицы должна быть равна нулю
sum :=
    for i ∈ 1 .. rows(GSM)
        sum[i] ← sum(GSM[i, j], j = 1 .. cols(GSM))
    sum
GSM = [
    366667, 0, 0, 0, -58974.4, 0, 0, 0;
    0, 1, 0, 0, 0, 0, 0, 0;
    0, 0, 1, 0, 0, 0, 0, 0;
    0, 0, 0, 1, 0, 0, 0, 0;
    -58974.4, 0, 0, 0, 366667, 0, 0, 0;
    0, 0, 0, 0, 0, 1, 0, 0;
    0, 0, 0, 0, 0, 0, 1, 0;
    0, 0, 0, 0, 0, 0, 0, 1
]
GLV = [-100000; 0; 0; 0; -100000; 0; 0; 0]
sum = [307693; 1; 1; 1; 307693; 1; 1; 1]
sum(GLV[i], i = 1 .. rows(GLV)) = -200000  # Н
u := READPRN("u.txt")  # вектор перемещений, полученный с помощью PARDISO
# Аналитика:
a := 150  # мм
b := 100  # мм
q := 1000  # Н/мм
t := 3  # мм
E := 2.1*10^5  # МПа
σ := q*b/(t*b) = 333.333  # МПа
|GSM| = 1.30967e11
disp := GSM^-1*GLV
scale := 20
u_an := a*σ/E = 0.238095
NEW_COORDS :=
    n ← rows(nodes)
    for i ∈ 1 .. n
        res[i, 2] ← nodes[i, 2] + scale*u[2*i - 1]
        res[i, 3] ← nodes[i, 3] + scale*u[2*i - 0]
        res[i, 1] ← i
    res
NEW_COORDS = [1, -6.5, 0; 2, 300, 0; 3, -6.5, 200; 4, 300, 200]
disp = [-0.325; 0; 0; 0; -0.325; 0; 0; 0]
u = [-0.325; 0; 0; 0; -0.325; 0; 0; 0]
FXn :=
    for i ∈ 1 .. m1
        for j ∈ 1 .. 4
            FX[i, j] ← NEW_COORDS[:, 2][elements[i, j + 1]]
            FX[i, 4] ← FX[i, 3] if j == 3
            FX[i, 5] ← FX[i, 1]
            FX[i, 6] ← sqrt(-1)
    FX
FYn :=
    for i ∈ 1 .. m1
        for j ∈ 1 .. 4
            FY[i, j] ← NEW_COORDS[:, 3][elements1[i, j + 1]]
            FY[i, 4] ← FY[i, 3] if j == 3
            FY[i, 5] ← FY[i, 1]
            FY[i, 6] ← sqrt(-1)
    FY
Prog(M) :=
    k ← 1
    for i ∈ 1 .. rows(M)
        for j ∈ 1 .. cols(M)
            G[k] ← M[i, j]
            k ← k + 1
    G
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nodes = [1, 0, 0; 2, 300, 0; 3, 0, 200; 4, 300, 200]
NEW_COORDS = [1, -6.5, 0; 2, 300, 0; 3, -6.5, 200; 4, 300, 200]
FX = [0, 300, 300, 0, 0, 1i]
FXn = [-6.5, 300, 300, -6.5, -6.5, 1i]
FY = [0, 0, 200, 200, 0, 1i]
FYn = [0, 0, 200, 200, 0, 1i]
(|u[1]| - |u[3]|)/|u[1]|*100 = 100
